<?xml version="1.0" ?>
<!-- $Id: LZ-129_prop.xml,v 1.3 2010-03-25 17:29:54 anders Exp $ -->
<!--

  L-11 Zeppelin flight model for JSBSim.

    Copyright (C) 2007 - 2009 Anders Gidenstam  (anders(at)gidenstam.org)
    This file is licensed under the GPL license version 2 or later.
-->
<!--

       Propeller data from [Bentele, 1992]:

       Max power:           350 HP
       Max rpm:             1400 rpm
       Cruise power:        330 HP
       Cruise rpm:          1350 rpm
       Reduction gear:      2:1
       Propeller diameter:  5.0 m
       Propeller rpm (cruise): 625 rpm

  References :
  ==========

  - Eugen Bentele, "The Story of a Zeppelin Mechanic",
    Zeppelin-Museum Friedrichshafen, 1992.

-->
<!-- Generated by Aero-Matic v 0.8

     Inputs:
                horsepower: 940
                     pitch: fixed
            max engine rpm: 1350
        prop diameter (ft): 19.686

     Outputs:
              max prop rpm: 953.11
                gear ratio:   1.42
                       Cp0:0.018345
                       Ct0:0.015776
       static thrust (lbs):1421.80
-->
<propeller name="L-11-zepp-prop">
  <ixx>39.2329 </ixx>
  <diameter unit="M">5.0</diameter>
  <numblades> 4.0 </numblades>
  <minpitch> 17.5 </minpitch>
  <maxpitch> 17.5 </maxpitch>
  <gearratio>1.5 </gearratio>

  <table name="C_THRUST" type="internal">
     <tableData>
       0.0  0.0628
       0.1  0.0642
       0.2  0.0573
       0.3  0.0479
       0.4  0.0401
       0.5  0.035
       0.6  0.0279
       0.7  0.019
       0.8  0.0104
	   0.9  0.0021
       1.0  -0.0012
       1.2  -0.0062
     </tableData>
  </table>


  <table name="C_POWER" type="internal">
     <tableData>
       0.0  0.0183
       0.1  0.0183
       0.2  0.0179
       0.3  0.0175
       0.4  0.0165
       0.5  0.0151
       0.6  0.0139
       0.7  0.0116
       0.8  0.0095
       1.0  0.0034
       1.2  -0.0054
       1.4  -0.0163
       1.6  -0.0277
     </tableData>
  </table>

</propeller>
